σпц := 120*10^6
p := 800
σв := 320*10^6
f := 1.5
L := 1.2
p0 := 0.12*10^6
H := 2.4
σ02 := 160*10^6
E := 6.8*10^4
R := 1.5
nx := 3.0
M := f*350*10^3 = 525000
R0 := 2.4
N := f*400*10^3 = 600000
Q := f*150*10^3 = 225000
H0 := R0 - sqrt(R0^2 - R^2) = 0.526501
Pmax := p*9.81*nx*(H + H0) + p0 = 188902
H0*10^3 = 526.501
Ph := p0 + p*9.81*H*nx = 176506
# Подбор толщины нижнего днища
δ01 := f*Pmax*R0*10^3/(2*σв*0.85) = 1.25008
δ0 := δ01 + 0.5 = 1.75008
δ0 := 2
# Подбор толщины верхнего днища
δ02 := f*p0*R0*10^3/(2*σв*0.85) = 0.794118
δ2 := δ02 + 0.5 = 1.29412
δ2 := 1.5
# Побдор толщины обечайки
δ03 := f*Ph*R*10^3/(σв*0.85) = 1.46006
δ := δ03 + 0.5 = 1.96006
δ := 2.5
# Сечение стыкового шпангоута
Θ0 := asin(R/R0)*180/π = 38.6822
l := 0.6*sqrt(R*10^3*δ) = 36.7423
δ0 = 2
l0 := 0.6*sqrt(R0*10^3*δ0) = 41.5692
α := Θ0 - l0*180/(R0*10^3*π) = 37.6898
Ω1 := -(R*10^3 - l*tan(α*deg) - l0/cos(Θ0*deg))^2/(2*tan(α*deg)) = -1301929
Ω2 := l^2*tan(α*deg)/2 + l*l0/cos(Θ0*deg) + l0^2*tan(Θ0*deg)/2 = 3169.84
Ω := Ω1 + Ω2 = -1298759
Pmax = 188902
Nшп := f*Pmax*Ω/10^6 = -368006
Fшп := |Nшп*10^6/(σв*0.85)| - δ*l - δ0*l0 = 1177.97
F := 2*π*R*10^3*δ = 23561.9
I := π*(R*10^3)^3*δ = 2.65072e10
M/1.5*10^3 = 350000000
N = 600000
Gmax := N/F + M*10^3*R*10^3/I = 55.1737
N/F = 25.4648
Gmin := N/F - M*10^3*R*10^3/I = -4.24413
# Расчет бака на устойчивость от нормальных напряжений
τ := Q/(π*R*1000*δ) = 19.0986
k0 := 1/π*nthroot((100*δ/(R*1000))^3, 8) = 0.162571
km := (N*R - 1.25*2*|M|)/(N*R - 2*|M|) = 2.75
Ph = 176506
α1 := Ph*(R*10^3)^2/(E*δ^2*10^6) = 0.934441
kp := (1 + 0.21*α1*(R*1000/δ)^0.6)/(1 + 3*α1) = 2.65899
ki := 1
k := k0*km*kp*ki = 1.18876
Gкр := k*E*δ/(R*1000) = 134.726
A := 1.2406
G22 := Ph/10^6*R*1000/δ = 105.903
B := 0.0956031
C := 0.0108
D := 0.0593121
Gi := sqrt(Gкр^2 + Gкр*G22 + G22^2) = 208.889
G := 0.6812
ε := Gi*10^6/σпц = 1.74074
Ec := E/ε*(C/(ε - G)^2 + ε*D + A - B/(ε - G)) = 49346.9
Ek := E*(D + B/(ε - G)^2 - 2*C/(ε - G)^3) = 8589.29
ki := sqrt(Ec*Ek)/E = 0.302761
Gкр := ki*Gкр = 40.7897
R = 1.5
δ = 2.5
N/(f*10^3) = 400
M/(f*10^3) = 350
Ph = 176506
Gкр := 57.889
Gmax = 55.1737
η := Gкр/|Gmax| = 1.04921
# Расчет на устойчивость от касательных напряжений
τкр0 := 0.78*10^6*E*δ/(R*10^3)*nthroot((δ*R*10^3)/(L*10^3)^2, 4) = 19969604
Pкр := 0.92*10^6*E*δ/(L*10^3)*δ/(R*10^3)*sqrt(δ/(R*10^3)) = 8868.06
L = 1.2
kp := sqrt(1 + Ph/Pкр) = 4.57204
ki := 1
τкр := kp*ki*τкр0/10^6 = 91.3018
σ1 := N/(2*π*R*10^3*δ*f) = 16.9765
σ2 := Ph/10^6*R/δ*10^3 = 105.903
σI := sqrt(σ1^2 + σ2^2 - σ1*σ2 + 3*τкр^2) = 186.317
ε01 := σI/(σпц/10^6) = 1.55264
Ec := E/ε01*(C/(ε01 - G)^2 + ε01*D + A - B/(ε01 - G)) = 54185.1
Ek := E*(D + B/(ε01 - G)^2 - 2*C/(ε01 - G)^3) = 10374.4
ki := sqrt(Ec*Ek)/E = 0.348668
τкр := ki*τкр = 31.834
R = 1.5
δ = 2.5
L = 1.2
N/(f*10^3) = 400
Ph/10^6 = 0.176506
Pкр/10^5 = 0.0886806
τкр := 53.65
τ = 19.0986
η := τкр/τ = 2.80911
